# Description of varibles | Model 1
# m1 - population of species M in habitat 1
# m2 - population of species M in habitat 2
# n1 - population of species N in habitat 1
# n2 - population of species N in habitat 2
# r1 - net growth rate of species M in habitat 1
# r2 - net growth rate of species M in habitat 2
# s1 - net growth rate of species N in habitat 1
# s2 - net growth rate of species N in habitat 2
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# K1 - carrying capacity of species M in habitat 1
# K2 - carrying capacityof species M in habitat 2
# L1 - carrying capacityof species N in habitat 1
# L2 - carrying capacityof species N in habitat 2
# α - competition interaction coefficent of species N on M
# β - competition interaction coefficent of species M on N
# Dm - specific migration rate of species M
# Dn -  specific migration rate of species N
# Sm - asymmetry coefficient of species M
# Sn - asymmetry coefficient of species N
# ε - migration magnitude/intensity
# Equilibrium solution X0 for ε=0 (isolated habitats)
Given
r1*m1*(1 - m1/K1 - α*n1/K1) == 0
r2*m2*(1 - m2/K2 - α*n2/K2) == 0
s1*n1*(1 - n1/L1 - β*m1/L1) == 0
s2*n2*(1 - n2/L2 - β*m2/L2) == 0
Find(m1, m2, n1, n2) → [
    0, 0, 0, K1, 0, K1, 0, 0, K1, 0, -(K1 - L1*α)/(β*α - 1), 0, -(K1 - L1*α)/(β*α - 1), -(K1 - L1*α)/(β*α - 1), K1, -(K1 - L1*α)/(β*α - 1);
    0, 0, K2, 0, 0, 0, 0, K2, K2, -(K2 - L2*α)/(β*α - 1), 0, -(K2 - L2*α)/(β*α - 1), 0, K2, -(K2 - L2*α)/(β*α - 1), -(K2 - L2*α)/(β*α - 1);
    0, L1, 0, 0, 0, 0, L1, L1, 0, 0, -(L1 - K1*β)/(β*α - 1), L1, -(L1 - K1*β)/(β*α - 1), -(L1 - K1*β)/(β*α - 1), 0, -(L1 - K1*β)/(β*α - 1);
    0, 0, 0, 0, L2, L2, L2, 0, 0, -(L2 - K2*β)/(β*α - 1), 0, -(L2 - K2*β)/(β*α - 1), L2, 0, -(L2 - K2*β)/(β*α - 1), -(L2 - K2*β)/(β*α - 1)
]
# All eqilibrium solutions
X0 := [
    0, 0, 0, K1, 0, K1, 0, 0, K1, 0, -(K1 - L1*α)/(β*α - 1), 0, -(K1 - L1*α)/(β*α - 1), -(K1 - L1*α)/(β*α - 1), K1, -(K1 - L1*α)/(β*α - 1);
    0, 0, K2, 0, 0, 0, 0, K2, K2, -(K2 - L2*α)/(β*α - 1), 0, -(K2 - L2*α)/(β*α - 1), 0, K2, -(K2 - L2*α)/(β*α - 1), -(K2 - L2*α)/(β*α - 1);
    0, L1, 0, 0, 0, 0, L1, L1, 0, 0, -(L1 - K1*β)/(β*α - 1), L1, -(L1 - K1*β)/(β*α - 1), -(L1 - K1*β)/(β*α - 1), 0, -(L1 - K1*β)/(β*α - 1);
    0, 0, 0, 0, L2, L2, L2, 0, 0, -(L2 - K2*β)/(β*α - 1), 0, -(L2 - K2*β)/(β*α - 1), L2, 0, -(L2 - K2*β)/(β*α - 1), -(L2 - K2*β)/(β*α - 1)
]
# Coexistance solution X0
X0[:, 15] → [-(K1 - L1*α)/(β*α - 1); -(K2 - L2*α)/(β*α - 1); -(L1 - K1*β)/(β*α - 1); -(L2 - K2*β)/(β*α - 1)]
# Simplifed coexistance solution
X0[:, 15] substitute, β == α, L1 == K1, L2 == K2 → [K1/(α + 1); K2/(α + 1); K1/(α + 1); K2/(α + 1)]
# Equilibrium pretrubated solutions for small ε (semi-isolated habitats)
# Original system
r1*m1*(1 - m1/K1 - α*n1/K1) + ε*Dm*(m2 - Sm*m1) == 0
r2*m2*(1 - m2/K2 - α*n2/K2) + ε*Dm*(Sm*m1 - m2) == 0
s1*n1*(1 - n1/L1 - β*m1/L1) + ε*Dn*(n2 - Sn*n1) == 0
s2*n2*(1 - n2/L2 - β*m2/L2) + ε*Dn*(Sn*n1 - n2) == 0
# Suppose pretrubated solutions
m1 := m10 + ε*m11  # error: This function requires at least 3 arguments but is applied to 1.
m2 := m20 + ε*m21  # error: This function requires at least 3 arguments but is applied to 1.
n1 := n10 + ε*n11  # error: This function requires at least 3 arguments but is applied to 1.
n2 := n20 + ε*n21  # error: This function requires at least 3 arguments but is applied to 1.
# Rewrite system with respect of ε order
(r1*m1*(1 - m1/K1 - α*n1/K1) + ε*Dm*(m2 - Sm*m1)) collect, ε → (Dm*(m21 - Sm*m11) - m11*r1*(m11/K1 + α*n11/K1))*ε^2 + (Dm*(m20 - Sm*m10) - r1*(m10*(m11/K1 + α*n11/K1) + m11*(m10/K1 + α*n10/K1 - 1)))*ε - m10*r1*(m10/K1 + α*n10/K1 - 1)
(r2*m2*(1 - m2/K2 - α*n2/K2) + ε*Dm*(Sm*m1 - m2)) collect, ε → (-Dm*(m21 - Sm*m11) - m21*r2*(m21/K2 + α*n21/K2))*ε^2 + (-Dm*(m20 - Sm*m10) - r2*(m20*(m21/K2 + α*n21/K2) + m21*(m20/K2 + α*n20/K2 - 1)))*ε - m20*r2*(m20/K2 + α*n20/K2 - 1)
(s1*n1*(1 - n1/L1 - β*m1/L1) + ε*Dn*(n2 - Sn*n1)) collect, ε → (Dn*(n21 - Sn*n11) - n11*s1*(n11/L1 + β*m11/L1))*ε^2 + (Dn*(n20 - Sn*n10) - s1*(n10*(n11/L1 + β*m11/L1) + n11*(n10/L1 + β*m10/L1 - 1)))*ε - n10*s1*(n10/L1 + β*m10/L1 - 1)
(s2*n2*(1 - n2/L2 - β*m2/L2) + ε*Dn*(Sn*n1 - n2)) collect, ε → (-Dn*(n21 - Sn*n11) - n21*s2*(n21/L2 + β*m21/L2))*ε^2 + (-Dn*(n20 - Sn*n10) - s2*(n20*(n21/L2 + β*m21/L2) + n21*(n20/L2 + β*m20/L2 - 1)))*ε - n20*s2*(n20/L2 + β*m20/L2 - 1)
# System for the liner terms aproximation
Dm*(m20 - Sm*m10) - r1*(m10*(m11/K1 + α*n11/K1) + m11*(m10/K1 + α*n10/K1 - 1)) == 0
-Dm*(m20 - Sm*m10) - r2*(m20*(m21/K2 + α*n21/K2) + m21*(m20/K2 + α*n20/K2 - 1)) == 0
Dn*(n20 - Sn*n10) - s1*(n10*(n11/L1 + β*m11/L1) + n11*(n10/L1 + β*m10/L1 - 1)) == 0
-Dn*(n20 - Sn*n10) - s2*(n20*(n21/L2 + β*m21/L2) + n21*(n20/L2 + β*m20/L2 - 1)) == 0
# Simplified system for the liner terms, where β=α,L1=K1,L2=K2
m10 := K1/(1 + α)
n10 := K1/(1 + α)
m20 := K2/(1 + α)
n20 := K2/(1 + α)
Given
Dm*(m20 - Sm*m10) - r1*(m10*(m11/K1 + α*n11/K1) + m11*(m10/K1 + α*n10/K1 - 1)) == 0
-Dm*(m20 - Sm*m10) - r2*(m20*(m21/K2 + α*n21/K2) + m21*(m20/K2 + α*n20/K2 - 1)) == 0
Dn*(n20 - Sn*n10) - s1*(n10*(n11/K1 + α*m11/K1) + n11*(n10/K1 + α*m10/K1 - 1)) == 0
-Dn*(n20 - Sn*n10) - s2*(n20*(n21/K2 + α*m21/K2) + n21*(n20/K2 + α*m20/K2 - 1)) == 0
Find(m11, m21, n11, n21) → [
    (Dm*K2*s1 - Dm*K1*Sm*s1 - Dn*K2*α*r1 + Dn*K1*Sn*α*r1)/(r1*s1 - α^2*r1*s1);
    -(Dm*K2*s2 - Dm*K1*Sm*s2 - Dn*K2*α*r2 + Dn*K1*Sn*α*r2)/(r2*s2 - α^2*r2*s2);
    (Dn*K2*r1 - Dn*K1*Sn*r1 - Dm*K2*α*s1 + Dm*K1*Sm*α*s1)/(r1*s1 - α^2*r1*s1);
    -(Dn*K2*r2 - Dn*K1*Sn*r2 - Dm*K2*α*s2 + Dm*K1*Sm*α*s2)/(r2*s2 - α^2*r2*s2)
]
# Solution for the linear terms X1
X1 := [
    (Dm*K2*s1 - Dm*K1*Sm*s1 - Dn*K2*α*r1 + Dn*K1*Sn*α*r1)/(r1*s1 - α^2*r1*s1);
    -(Dm*K2*s2 - Dm*K1*Sm*s2 - Dn*K2*α*r2 + Dn*K1*Sn*α*r2)/(r2*s2 - α^2*r2*s2);
    (Dn*K2*r1 - Dn*K1*Sn*r1 - Dm*K2*α*s1 + Dm*K1*Sm*α*s1)/(r1*s1 - α^2*r1*s1);
    -(Dn*K2*r2 - Dn*K1*Sn*r2 - Dm*K2*α*s2 + Dm*K1*Sm*α*s2)/(r2*s2 - α^2*r2*s2)
]
# Simplifed solution X1S for s1=r1,s2=r2, Sm=Sn=S
X1 substitute, s1 == r1, s2 == r2, Sm == S, Sn == S; simplify → [
    -(K2 - K1*S)*(Dm - Dn*α)/(r1*(α^2 - 1));
    (K2 - K1*S)*(Dm - Dn*α)/(r2*(α^2 - 1));
    -(K2 - K1*S)*(Dn - Dm*α)/(r1*(α^2 - 1));
    (K2 - K1*S)*(Dn - Dm*α)/(r2*(α^2 - 1))
]
X1S := [
    -(K2 - K1*S)*(Dm - Dn*α)/(r1*(α^2 - 1));
    (K2 - K1*S)*(Dm - Dn*α)/(r2*(α^2 - 1));
    -(K2 - K1*S)*(Dn - Dm*α)/(r1*(α^2 - 1));
    (K2 - K1*S)*(Dn - Dm*α)/(r2*(α^2 - 1))
]
# Pretrubated solution X=X0+εX1+o(ε^2)
X := [m10; m20; n10; n20] + ε*X1S
X → [
    K1/(α + 1) - ε*(K2 - K1*S)*(Dm - Dn*α)/(r1*(α^2 - 1));
    K2/(α + 1) + ε*(K2 - K1*S)*(Dm - Dn*α)/(r2*(α^2 - 1));
    K1/(α + 1) - ε*(K2 - K1*S)*(Dn - Dm*α)/(r1*(α^2 - 1));
    K2/(α + 1) + ε*(K2 - K1*S)*(Dn - Dm*α)/(r2*(α^2 - 1))
]
# Population sizes of species M, N and total population size T
M := X[0] + X[1]
N := X[2] + X[3]
T := M + N
M collect, ε, 1 + α; simplify → (K1 + K2)/(α + 1) + ε*(r1 - r2)*(K2 - K1*S)*(Dm - Dn*α)/(r1*r2*(α^2 - 1))
N collect, ε, 1 + α; simplify → (K1 + K2)/(α + 1) + ε*(r1 - r2)*(K2 - K1*S)*(Dn - Dm*α)/(r1*r2*(α^2 - 1))
T collect, ε → ((K2 - K1*S)*(Dm - Dn*α)/(r2*(α^2 - 1)) - (K2 - K1*S)*(Dn - Dm*α)/(r1*(α^2 - 1)) - (K2 - K1*S)*(Dm - Dn*α)/(r1*(α^2 - 1)) + (K2 - K1*S)*(Dn - Dm*α)/(r2*(α^2 - 1)))*ε + 2*K1/(α + 1) + 2*K2/(α + 1)
((K2 - K1*S)*(Dm - Dn*α)/(r2*(α^2 - 1)) - (K2 - K1*S)*(Dn - Dm*α)/(r1*(α^2 - 1)) - (K2 - K1*S)*(Dm - Dn*α)/(r1*(α^2 - 1)) + (K2 - K1*S)*(Dn - Dm*α)/(r2*(α^2 - 1))) simplify → -(r1 - r2)*(K2 - K1*S)*(Dm + Dn)/(r1*r2*(α + 1))
# Results from main text
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