# System of equations for equilibrium population sizes with s1=r1,s2=r2, L1=K1, L2=K2, Sm=Sn=S, β=α (ecologically equivalent species ),
# M is "fast" and N is "slow" species, i.e., Dm>Dn
DX := [
    r1*m1*(1 - m1/K1 - α*n1/K1) + ε*Dm*(m2 - S*m1);
    r2*m2*(1 - m2/K2 - α*n2/K2) + ε*Dm*(S*m1 - m2);
    r1*n1*(1 - n1/K1 - α*m1/K1) + ε*Dn*(n2 - S*n1);
    r2*n2*(1 - n2/K2 - α*m2/K2) + ε*Dn*(S*n1 - n2)
]  # error: This function requires at least 3 arguments but is applied to 1.
# Set of parameters (the sessile condition case) α=0.25,r1=1,r2=2,K1=20,K2=10,Dm=0.3,Dn=0.1, S=2
r1 := 2
r2 := 1
K1 := 20
K2 := 10
Dm := 0.5
Dn := 0.1
α := 0.25
S := 2
ε := 1
# Population sizes MN0(m1,m2,n1,n2) in the isolated patches case
MN0 := 1/(1 + α)*[K1; K2; K1; K2]
# Population sizes MNinf in the well-mixed case
MNinf := (1 + α)^-1*[
    K1*K2*(r1 + S*r2)/(K1*r2*S^2 + K2*r1);
    K1*K2*S*(r1 + S*r2)/(K1*r2*S^2 + K2*r1);
    K1*K2*(r1 + S*r2)/(K1*r2*S^2 + K2*r1);
    K1*K2*S*(r1 + S*r2)/(K1*r2*S^2 + K2*r1)
]
# Linear approximation term X0, i.e., Approximated (at small ε) population sizes are X=MN0+ε*X0+O(ε^2)
X0 := [
    -(K2 - K1*S)*(Dm - Dn*α)/(r1*(α^2 - 1));
    (K2 - K1*S)*(Dm - Dn*α)/(r2*(α^2 - 1));
    -(K2 - K1*S)*(Dn - Dm*α)/(r1*(α^2 - 1));
    (K2 - K1*S)*(Dn - Dm*α)/(r2*(α^2 - 1))
]
# Initial guess
[m1; m2; n1; n2] := MN0
# vv(ε) is numerical solution for the system
Given
r1*m1*(1 - m1/K1 - α*n1/K1) + ε*Dm*(m2 - S*m1) == 0
r2*m2*(1 - m2/K2 - α*n2/K2) + ε*Dm*(S*m1 - m2) == 0
r1*n1*(1 - n1/K1 - α*m1/K1) + ε*Dn*(n2 - S*n1) == 0
r2*n2*(1 - n2/K2 - α*m2/K2) + ε*Dn*(S*n1 - n2) == 0
vv(ε) := Find(m1, m2, n1, n2)
# ε0 is the boundary value of the migration magnitude for linear approximation
ε0 := min(r1, r2)/max(Dm*S, Dm, Dn*S, Dn)
# Numerical values
vv(500) = [6.41075; 12.7908; 6.4909; 12.8272]
MNinf = [6.4; 12.8; 6.4; 12.8]  # Check at infinity
vv(0) = [16; 8; 16; 8]
MN0 = [16; 8; 16; 8]  # Check at zero
M0 := MN0[0] + MN0[1]
Minf := MNinf[0] + MNinf[1]
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